* fichier :  test_extr.dgibi
************************************************************************
* Section : Langage Objets
************************************************************************
*
*********************  CAS TEST : test_extr.dgibi  *********************
*
*
* Ce test permet de vérifier le bon fonctionnement de l'operateur EXTR
* dans le cas des OBJETS MMODEL et MCHAML vides. Ces opérations
* aboutissaient souvent a des GEMAT ERROR avant qu'une correction ne soit
* apportée.
*
*-------------------------------------------------------------------
* Auteur : CB215821 30/04/2015
*-------------------------------------------------------------------
*
MMODVID = VIDE 'MMODEL'                     ;
MAIL1   = 'EXTR' MMODVID 'MAILLAGE'         ;list MAIL1;
ZONE1   = 'EXTR' MMODVID 'ZONE'             ;list ZONE1;
NOCO1   = 'EXTR' MMODVID 'MATE'             ;list NOCO1;
CONS1   = 'EXTR' MMODVID 'CONS' 'TOTO'      ;list CONS1;
FORM1   = 'EXTR' MMODVID 'FORM' 'MECANIQUE' ;list FORM1;
ELEM1   = 'EXTR' MMODVID 'ELEM' 'QUA4'      ;list ELEM1;
NOCO2   = 'EXTR' MMODVID 'DEPL'             ;list NOCO2;

MCHMVID = VIDE 'MCHAML'                     ;
MAIL1   = 'EXTR' MCHMVID 'MAILLAGE'         ;list MAIL1;
TITR1   = 'EXTR' MCHMVID 'TITR'             ;list TITR1;
TYPE1   = 'EXTR' MCHMVID 'TYPE'             ;list TYPE1;
COMP1   = 'EXTR' MCHMVID 'COMP'             ;list COMP1;
CONS1   = 'EXTR' MCHMVID 'CONS'             ;list CONS1;
DEVA1   = 'EXTR' MCHMVID 'DEVA'             ;list DEVA1;
COVA1   = 'EXTR' MCHMVID 'COVA'             ;list COVA1;

FIN;
