* fichier topoptim_04.dgibi
************************************************************************
************************************************************************

************************************************************************
** Topology optimization of a simple 2D structure subjected to a
** multicase mechanical loading.
**
** Author:
** Guenhael Le Quilliec (LaMe - Polytech Tours)
**
** Version:
** V2.0 2017/04/18 Updated to make it compatible with TOPOPTIM V2.0
** V1.0 2014/04/28 Original version compatible with TOPOPTIM V1.0
************************************************************************

graph0 = FAUX ;

* General options
OPTI 'DIME' 2 'MODE' 'PLAN' 'CONT' 'ELEM' QUA4 ;

* Mesh
p0 = 0.0 0.0 ;
p1 = 0.0 10.0 ;
p2 = 10.0 0.0 ;
lgn0 = DROI 30 p1 p0 ;
msh0 = TRAN lgn0 30 p2 ;
p2 = msh0 POIN 'PROC' p2 ;
p3 = msh0 POIN 'PROC' (10.0 10.0) ;

* Model and material
mod0 = MODE msh0 'MECANIQUE' 'ELASTIQUE' ;
mat0 = MATE mod0 'YOUN' 210.0e9 'NU' 0.3 ;

* Boundary conditions and multicase loading
bc0 = BLOQ 'UX' 'UY' lgn0 ;
load0 = TABL ;
load0.(1) = FORC (0.3  0.6) p2 ;
load0.(2) = FORC (0.0  1.0) p3 ;

* Finite element model table
mdl0 = TABL ;
mdl0.'MODELE'              = mod0 ;
mdl0.'CARACTERISTIQUES'    = mat0 ;
mdl0.'BLOCAGES_MECANIQUES' = bc0 ;
mdl0.'CHARGEMENT'          = load0 ;

* Optimization table
tab0 = TABL ;
tab0.'RESOLUTION_LINEAIRE' = mdl0 ;
tab0.'FRACTION_VOLUME'     = 0.5 ;
tab0.'TRAC'                = graph0 ;

* Optimization
TOPOPTIM tab0 ;

* Plot to screen
topo0 = tab0.'TOPOLOGIE'.(tab0.'CYCLE') ;
topomsh0 = tab0.'MAILLAGE'.(tab0.'CYCLE') ;
SI graph0 ;
    TRAC (REDU topo0 topomsh0) (REDU mod0 topomsh0)
         (PROG 0.0 'PAS' (1.0 / 56.0) 1.0) ;
FINS ;

FIN ;
