$$$$ BILI_MOY
* BILI_MOY  PROCEDUR  FANDEUR   14/10/10    21:15:02     8178
*
debproc BILI_MOY cycle*'LISTREEL' npass*'LISTENTI' model*'TABLE';
*
* verification elementaire
*
lok=vrai;
nbcl='DIME' cycle;
'SI' (('DIME' npass) 'NEG' nbcl);
  lok=faux;
  'MESS' 'cycle et pas n"ont pas la meme longueur';
'FINSI';
'SI' (lok 'ET' ('EXISTE' model 'EELA')); EELA=model.'EELA';
'SINON'; lok=faux;  'MESS' 'EELA n"est pas dans model';
'FINSI';
'SI' (lok 'ET' ('EXISTE' model 'EAYI')); EAYI=model.'EAYI';
'SINON'; lok=faux;  'MESS' 'EAYI n"est pas dans model';
'FINSI';
'SI' (lok 'ET' ('EXISTE' model 'YMOM')); YMOM=model.'YMOM';
'SINON'; lok=faux;  'MESS' 'YMOM n"est pas dans model';
'FINSI';
'SI' (lok 'ET' ('EXISTE' model 'INRY')); INRY=model.'INRY';
'SINON'; lok=faux;  'MESS' 'INRY n"est pas dans model';
'FINSI';
*
'SI' (lok 'ET' ('EXISTE' model 'ELEN')); ELEN=model.'ELEN';
'SINON'; ELEN='TIMO'; 'MESS' 'ELEN est pris egal a TIMO';
'FINSI';
*
'SI' lok;
*
* maillage de 1 element
*
  p1=0 0 0; p2=1 0 0;d1=p1 d 1 p2;
*
* champs nuls
*
  xx yy zz='COOR' d1;
  deplx='EXCO' (0*xx) 'SCAL' 'NOID' 'UX';
  deply='EXCO' (0*xx) 'SCAL' 'NOID' 'UY';
  rotax='EXCO' (0*xx) 'SCAL' 'NOID' 'RX';
  rotaz='EXCO' (0*xx) 'SCAL' 'NOID' 'RZ';
  chnul=deplx + deply + rotax + rotaz;
*
* modele
*
  mo = mode d1 'MECANIQUE' 'ELASTIQUE' 'PLASTIQUE' 'BILIN_MOMY' ELEN;
  ma = mate mo 'YOUN' EELA 'NU' .2 'EAYI' EAYI 'YMOM' YMOM;
  ca = cara mo 'INRY' INRY 'SECT' 1. 'INRZ' 1. 'TORS' 1.;
  mc=ma et ca;
*
* initialisation
*
  cin=0.; ccour=prog 0.; mmoy=prog 0.;
  var0=zero mo 'VARINTER';
  sig0=zero mo 'CONTRAIN';
*
* loop sur les branches;
*
  nbran=0; x1x=prog 0. 1.;
  'REPETER' lab1 nbcl;
  nbran=nbran+1;
*
* chargement
*
    cfin='EXTR' cycle nbran; npts='EXTR' npass nbran;
    y1y ='PROG' cin cfin;   dx=1./npts; xxx='PROG' 0. pas dx 1.;
    yyy='IPOL' xxx x1x y1y; coury='ENLE' 1 yyy;
*
* increment elastique
*
    dtx=(cfin-cin)/npts;
    rotay='EXCO' (dtx*xx) 'SCAL' 'NOID' 'RY';
    deplz='EXCO' (((-0.5)*dtx)*xx) 'SCAL' 'NOID' 'UZ';
    depy=chnul + rotay + deplz;
    esig=epsi mo mc depy;
*
* loop charge
*
    j=0; momy='PROG';
    'REPETER' lab2 npts;
       j=j+1;
       sig var xxxx='ECOULE' mo sig0 var0 esig mc;
*
       ssig='CHAN' 'CHPO' mo sig; momo='EXTR' ssig 'MOMY' p1;
       momy='INSE' momy j momo;
*
       var0=var; sig0=sig;
*
    'FIN' lab2;
*
* fin loop
*
    ccour=ccour 'ET' coury; mmoy=mmoy 'ET' momy;
    cin=cfin;
    'MENAGE';
  'FIN' lab1;
'FINSI';
titre 'modele plastique BILIN_MOMY';
courbe=evol manu 'Courbure' ccour 'Moment' mmoy;
*
'FINPROC' courbe;
