$$$$ DONCHI2
* DONCHI2   PROCEDUR  AURI      97/12/24    21:15:37     3025
 DEBMETH DONCHI2 ;
 %SOUSTYPE='DONNEES_CHIMIQUES' ;
 %LOGC=FAUX ;
 %TOT= FAUX ;
 %METHODE GLOGC LCH2LOGC ;
 %METHODE GTOT LCH2TOT ;
 %METHODE GFIONI LCH2FION ;
 %METHODE GNTY4  LCH2NTY4 ;
 %METHODE GTEMPE LCH2TEMP ;
 %METHODE GCLIM LCH2CLIM ;
 %METHODE ACCES ACCDCHI2 ;
FINMETH ;
