$$$$ POINTCYL
* POINTCYL  PROCEDUR  NOBODY    92/01/01    00:00:00     001
*
*     DEFINITION D'UN POINT PAR SES COORDONNEES CYLINDRIQUES
*
'DEBPROC' POINTCYL RAYON*'FLOTTANT' ANGLE*'FLOTTANT' COTE/'FLOTTANT' ;
*
X = RAYON * ('COS' ANGLE) ;
Y = RAYON * ('SIN' ANGLE) ;
IDIM = VALE DIME;
'SI' (IDIM 'EGA' 2) ;
   PT = X Y ;
'SINON';
   PT = X Y COTE ;
'FINSI' ;
*
'FINPROC' PT ;
