$$$$ POINTSPH
* POINTSPH  PROCEDUR  NOBODY    92/01/01    00:00:00     001
'DEBPROC' POINTSPH LONG*'FLOTTANT' TETA*'FLOTTANT' PHI*'FLOTTANT' ;
*
*     DEFINITION D'UN POINT PAR SES COORDONNEES SPHERIQUES
*
COS_PHI = LONG * ('COS' PHI) ;
X = COS_PHI * ('COS' TETA) ;
Y = COS_PHI * ('SIN' TETA) ;
Z = LONG * ('SIN' PHI) ;
PT = X Y Z ;
*
'FINPROC' PT ;
